# Лабораторная работа 3 "Нахождение собственных значений матрицы"
# Гордеев Никита, группа 22307, вариант 7
# ! Начальные данные
D := [
    1.342, 0.432, -0.599, 0.202;
    0.432, 1.342, 0.256, -0.599;
    -0.599, 0.256, 1.342, 0.532;
    0.202, -0.599, 0.532, 1.342
]  # матрица
C := [0.05, 0, 0, 0; 0, 0.03, 0, 0; 0, 0, 0.02, 0; 0, 0, 0, 0.04]  # матрица
A := D + 7*C = [
    1.692, 0.432, -0.599, 0.202;
    0.432, 1.552, 0.256, -0.599;
    -0.599, 0.256, 1.482, 0.532;
    0.202, -0.599, 0.532, 1.622
]  # матрица
# 1) Нахождение собственных чисел и собственных векторов матрицы А
L := eigenvals(A) = [2.44366; 1.94484; 1.69117; 0.268324]  # вектор, содержащий собственные значения матрицы
# матрица, содержащая нормированные собственные вектора
W := eigenvecs(A) = [
    0.514876, 0.600711, -0.412428, 0.451611;
    0.464118, -0.432922, -0.593318, -0.495122;
    -0.489716, -0.378493, -0.563506, 0.547158;
    -0.528844, 0.555398, -0.400422, -0.501517
]
# 2) Поиск степенным методом наибольшего по модулю собственного числа матрицы и соответствующего нормированного собственного вектора
n := 70  # число итераций
k := 0 .. n  # номер итерации
y[:, 0] := [1; 1; 1; 1]  # начальный приближенный собственный вектор
y[:, k + 1] := A*y[:, k]  # новый приближённый вектор
λ1 := y[:, n + 1][0]/y[:, n][0] = 2.44366  # наибольшее по модулю собственное число матрицы
y[:, n + 1] := y[:, n + 1]/|y[:, n + 1]|  # новый приближенный собственный вектор после нормирования
y[:, n + 1] = [-0.514875; -0.464118; 0.489716; 0.528844]  # наибольшее по модулю собственный вектор матрицы
A*y[:, n + 1] - λ1*y[:, n + 1] = [6.10763e-8; 4.41094e-7; -1.34667e-7; -5.27394e-7]  # невязка полученного приближения
# 3) Нахождение собственных чисел и собственных векторов матрицы методом вращений
# i - номер строки, j - номер столбца максимального по модулю элемента матрицы A, расположенного выше главной диагонали
f(i, j, A) := if(A[i, i] ≠ A[j, j], 0.5*atan(2*A[i, j]/(A[i, i] - A[j, j])), π/4)  # угол матрицы вращения
c(i, j, A) := cos(f(i, j, A))  # косинус для обновления значения элемента матрицы A(i, j)
s(i, j, A) := sin(f(i, j, A))  # синус для обновления значения элемента матрицы A(i, j)
t(i, j, A) := sum(sum(A[i, j]^2, j = 0 .. 3), i = 0 .. 3) - sum(A[i, i]^2, i = 0 .. 3)  # сумма для вычисления нового значения элемента
# Итерация 1
i := 0
j := 2
V := identity(4)
# 1-я матрица 4 x 4
U := identity(4)  # 1-я матрица 4 x 4
U[i, i] := c(i, j, A)
# матрица U, косинус угла
U[j, j] := c(i, j, A)  # матрица U, косинус угла
U[i, j] := -s(i, j, A)
# матрица U, синус угла
U[j, i] := s(i, j, A)  # матрица U, синус угла
A := transpose(U)*A*U
# умножение матрицы
V := V*U  # умножение матрицы
t(i, j, A) = 1.86958  # мера отличия матрицы A от диагонального вида
A = [
    2.19513, 0.16614, 0, -0.187492;
    0.16614, 1.552, 0.473875, -0.599;
    0, 0.473875, 0.978867, 0.537285;
    -0.187492, -0.599, 0.537285, 1.622
]
# Итерация 2
i := 1
j := 3
U := identity(4)
U[i, i] := c(i, j, A)
U[i, j] := -s(i, j, A)
U[j, i] := s(i, j, A)
U[j, j] := c(i, j, A)
A := transpose(U)*A*U
V := V*U
t(i, j, A) = 1.15198
A = [
    2.19513, -0.00779557, 0, -0.250389;
    -0.00779557, 0.986978, 0.713385, 0;
    0, 0.713385, 0.978867, 0.0656805;
    -0.250389, 0, 0.0656805, 2.18702
]
# Итерация 3
i := 1
j := 2
U := identity(4)
U[i, i] := c(i, j, A)
U[i, j] := -s(i, j, A)
U[j, i] := s(i, j, A)
U[j, j] := c(i, j, A)
A := transpose(U)*A*U
V := V*U
t(i, j, A) = 0.134139
A = [
    2.19513, -0.00552795, 0.00549661, -0.250389;
    -0.00552795, 1.69632, 0, 0.0463109;
    0.00549661, 0, 0.269526, 0.046575;
    -0.250389, 0.0463109, 0.046575, 2.18702
]
# Итерация 4
i := 0
j := 3
U := identity(4)
U[i, i] := c(i, j, A)
U[i, j] := -s(i, j, A)
U[j, i] := s(i, j, A)
U[j, j] := c(i, j, A)
A := transpose(U)*A*U
V := V*U
t(i, j, A) = 0.00874941
A = [
    2.4415, -0.0364209, -0.0287477, 0;
    -0.0364209, 1.69632, 0, 0.0291338;
    -0.0287477, 0, 0.269526, 0.0370542;
    0, 0.0291338, 0.0370542, 1.94066
]
# Итерация 5
i := 0
j := 1
U := identity(4)
U[i, i] := c(i, j, A)
U[i, j] := -s(i, j, A)
U[j, i] := s(i, j, A)
U[j, j] := c(i, j, A)
A := transpose(U)*A*U
V := V*U
t(i, j, A) = 0.00609644
A = [
    2.44328, 0, -0.0287136, -0.00141885;
    0, 1.69454, -0.00140005, 0.0290993;
    -0.0287136, -0.00140005, 0.269526, 0.0370542;
    -0.00141885, 0.0290993, 0.0370542, 1.94066
]
# Итерация 6
i := 2
j := 3
U := identity(4)
U[i, i] := c(i, j, A)
U[i, j] := -s(i, j, A)
U[j, i] := s(i, j, A)
U[j, j] := c(i, j, A)
A := transpose(U)*A*U
V := V*U
t(i, j, A) = 0.00335042
A = [
    2.44328, 0, -0.0286751, -0.00205471;
    0, 1.69454, -0.00204445, 0.0290611;
    -0.0286751, -0.00204445, 0.268705, 0;
    -0.00205471, 0.0290611, 0, 1.94148
]
# Итерация 7
i := 1
j := 3
U := identity(4)
U[i, i] := c(i, j, A)
U[i, j] := -s(i, j, A)
U[j, i] := s(i, j, A)
U[j, j] := c(i, j, A)
A := transpose(U)*A*U
V := V*U
t(i, j, A) = 0.00166132
A = [
    2.44328, 0.000236963, -0.0286751, -0.002041;
    0.000236963, 1.69117, -0.00203081, 0;
    -0.0286751, -0.00203081, 0.268705, -0.00023578;
    -0.002041, 0, -0.00023578, 1.94485
]
# Итерация 8
i := 0
j := 2
U := identity(4)
U[i, i] := c(i, j, A)
U[i, j] := -s(i, j, A)
U[j, i] := s(i, j, A)
U[j, j] := c(i, j, A)
A := transpose(U)*A*U
V := V*U
t(i, j, A) = 1.68032e-5
A = [
    2.44365, 0.000263715, 0, -0.00203771;
    0.000263715, 1.69117, -0.00202751, 0;
    0, -0.00202751, 0.268327, -0.000262667;
    -0.00203771, 0, -0.000262667, 1.94485
]
# Итерация 9
i := 0
j := 1
U := identity(4)
U[i, i] := c(i, j, A)
U[i, j] := -s(i, j, A)
U[j, i] := s(i, j, A)
U[j, j] := c(i, j, A)
A := transpose(U)*A*U
V := V*U
t(i, j, A) = 1.66641e-5
A = [
    2.44365, 0, -7.10559e-7, -0.00203771;
    0, 1.69117, -0.00202751, 7.14134e-7;
    -7.10559e-7, -0.00202751, 0.268327, -0.000262667;
    -0.00203771, 7.14134e-7, -0.000262667, 1.94485
]
# Итерация 9
i := 0
j := 1
U := identity(4)
U[i, i] := c(i, j, A)
U[i, j] := -s(i, j, A)
U[j, i] := s(i, j, A)
U[j, j] := c(i, j, A)
A := transpose(U)*A*U
V := V*U
t(i, j, A) = 1.66641e-5
A = [
    2.44365, 0, -7.10559e-7, -0.00203771;
    0, 1.69117, -0.00202751, 7.14134e-7;
    -7.10559e-7, -0.00202751, 0.268327, -0.000262667;
    -0.00203771, 7.14134e-7, -0.000262667, 1.94485
]
# Сравнение полученных приближенных решений (собственные значения)
# вектор, содержащий собственные значения исходной матрицы
L = [2.44366; 1.94484; 1.69117; 0.268324]
# вектор, содержащий собственные значения новой матрицы
L_New := diag(A) = [2.44365; 1.69117; 0.268327; 1.94485]
L[0, :] - L_New[0, :] = [8.32431e-6]
L[1, :] - L_New[3, :] = [-8.28316e-6]
L[2, :] - L_New[1, :] = [2.88913e-6]
L[3, :] - L_New[2, :] = [-2.93028e-6]
# Сравнение полученных приближенных решений (собственные векторы)
W = [
    0.514876, 0.600711, -0.412428, 0.451611;
    0.464118, -0.432922, -0.593318, -0.495122;
    -0.489716, -0.378493, -0.563506, 0.547158;
    -0.528844, 0.555398, -0.400422, -0.501517
]
V = [
    0.517326, 0.413073, 0.450928, 0.598672;
    0.462345, 0.59261, -0.4959, -0.434895;
    -0.491258, 0.564284, 0.546414, -0.376406;
    -0.526571, 0.39971, -0.502174, 0.557473
]
vectorize(|W|)[:, 0] - vectorize(|V|)[:, 0] = [-0.00244988; 0.00177265; -0.00154184; 0.00227302]
vectorize(|W|)[:, 2] - vectorize(|V|)[:, 1] = [-0.000645552; 0.000707897; -0.000777572; 0.00071279]
vectorize(|W|)[:, 1] - vectorize(|V|)[:, 3] = [0.00203935; -0.00197247; 0.00208701; -0.00207544]
vectorize(|W|)[:, 3] - vectorize(|V|)[:, 2] = [0.000682192; -0.000777041; 0.000744318; -0.00065718]
